*Heading
** Job name: Job-1_good_situation Model name: Model-1
** Generated by: Abaqus/CAE 2016
*Preprint, echo=NO, model=NO, history=NO, contact=NO
**
** PARTS
**
*Part, name=Part-2
*Node
      1,   1.95000005,           0.
      2,           2.,           0.
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*Element, type=CPS4R
 1,   1,  83, 772, 108
 2,  83,  84, 773, 772
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*Nset, nset=Set-1
   73,   74,   75,   76,   77,   78
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*Elset, elset=Set-1, generate
 1801,  2000,     1
*Nset, nset=Set-2
   65,   66,   67,   68,   69,   70
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*Elset, elset=Set-2, generate
 1601,  1800,     1
*Nset, nset=Set-3
   57,   58,   59,   60,   61,   62
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*Elset, elset=Set-3, generate
 1401,  1600,     1
*Nset, nset=Set-4
   49,   50,   51,   52,   53,   54
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*Elset, elset=Set-4, generate
 1201,  1400,     1
*Nset, nset=Set-5
   41,   42,   43,   44,   45,   46
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*Elset, elset=Set-5, generate
 1001,  1200,     1
*Nset, nset=Set-6
   33,   34,   35,   36,   37,   38
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*Elset, elset=Set-6, generate
  801,  1000,     1
*Nset, nset=Set-7
   25,   26,   27,   28,   29,   30
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*Elset, elset=Set-7, generate
 601,  800,    1
*Nset, nset=Set-8
   17,   18,   19,   20,   21,   22
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*Elset, elset=Set-8, generate
 401,  600,    1
*Nset, nset=Set-9
    9,   10,   11,   12,   13,   14
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*Elset, elset=Set-9, generate
 201,  400,    1
*Nset, nset=Set-10
   1,   2,   3,   4,   5,   6
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*Elset, elset=Set-10, generate
   1,  200,    1
** Section: Section-10
*Solid Section, elset=Set-10, material=Material-concrete10
0.3,
** Section: Section-9
*Solid Section, elset=Set-9, material=Material-concrete9
0.3,
** Section: Section-8
*Solid Section, elset=Set-8, material=Material-concrete8
0.3,
** Section: Section-7
*Solid Section, elset=Set-7, material=Material-concrete7
0.3,
** Section: Section-6
*Solid Section, elset=Set-6, material=Material-concrete6
0.3,
** Section: Section-5
*Solid Section, elset=Set-5, material=Material-concrete5
0.3,
** Section: Section-4
*Solid Section, elset=Set-4, material=Material-concrete4
0.3,
** Section: Section-3
*Solid Section, elset=Set-3, material=Material-concrete3
0.3,
** Section: Section-2
*Solid Section, elset=Set-2, material=Material-concrete2
0.3,
** Section: Section-1
*Solid Section, elset=Set-1, material=Material-concrete1
0.3,
*End Part
**
**
** ASSEMBLY
**
*Assembly, name=Assembly
**
*Instance, name=Part-2-1, part=Part-2
*End Instance
**
*Nset, nset=SET-NODE_BOTTOM, instance=Part-2-1, generate
  5,  77,   4
*Nset, nset=Set-1, instance=Part-2-1
 81,
*Nset, nset=Set-2, instance=Part-2-1
 2,
*End Assembly
**
** MATERIALS
**
*Material, name=Material-concrete1
*Density
2300.,
*Elastic
2.754156e+10, 3.000000e-01
*Material, name=Material-concrete2
*Density
2300.,
*Elastic
2.773088e+10, 3.000000e-01
*Material, name=Material-concrete3
*Density
2300.,
*Elastic
2.536875e+10, 3.000000e-01
*Material, name=Material-concrete4
*Density
2300.,
*Elastic
2.585829e+10, 3.000000e-01
*Material, name=Material-concrete5
*Density
2300.,
*Elastic
1.084786e+10, 3.000000e-01
*Material, name=Material-concrete6
*Density
2300.,
*Elastic
1.511144e+10, 3.000000e-01
*Material, name=Material-concrete7
*Density
2300.,
*Elastic
1.919628e+10, 3.000000e-01
*Material, name=Material-concrete8
*Density
2300.,
*Elastic
2.526100e+10, 3.000000e-01
*Material, name=Material-concrete9
*Density
2300.,
*Elastic
27893484216, 3.000000e-01
*Material, name=Material-concrete10
*Density
2300.,
*Elastic
26113390108, 3.000000e-01
** ----------------------------------------------------------------
**
** STEP: Step-1
**
*Step, name=Step-1, nlgeom=NO, perturbation
*Frequency, eigensolver=Lanczos, sim=NO, acoustic coupling=on, normalization=displacement
20, , , , ,
**
** BOUNDARY CONDITIONS
**
** Name: BC-1 Type: Displacement/Rotation
*Boundary
Set-1, 2, 2
** Name: BC-2 Type: Displacement/Rotation
*Boundary
Set-2, 2, 2
**
** OUTPUT REQUESTS
**
*Restart, write, frequency=0
**
** FIELD OUTPUT: F-Output-1
**
*Output, field, variable=PRESELECT
*End Step
